# bulk water

units           metal
boundary        p p p
atom_style      atomic

neighbor        2.0 bin
neigh_modify    every 10 delay 0 check no

read_data	pan.data

mass		1 12.0107
mass		2 1.0080
mass		3 14.067

# pair_style	deepmd frozen_model.pb fparam 0.68938740
pair_style	deepmd frozen_model.pb
pair_coeff	* *

minimize 	0.0 1.0e-8 1000 100000

fix             1 all langevin 600 600 0.001 32324
fix		2 all nve/limit 0.1
timestep        0.0001
thermo_style    custom step pe ke etotal temp press vol
thermo          100
dump		1 all custom 100 traj.dump id type x y z fx fy fz

run             1000
